*Heading
** Job name: MPC-4m-Model-2-Cyclic Model name: MPC-4m-Model-2-Cyclic
** Generated by: Abaqus/CAE 6.14-1
*Preprint, echo=NO, model=NO, history=NO, contact=NO
** ----------------------------------------------------------------
**
** PART INSTANCE: top_segment
**
*Node
      1,           0.,        -236.,           0.
      2,           0.,        -236.,        1250.
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*Element, type=S4R
  1,   1,  13, 383, 120
  2,  13,  14, 384, 383
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*Nset, nset=top_segment__PickedSet2
    1,    2,    3,    4,    5,    6
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*Elset, elset=top_segment__PickedSet2, generate
    1,  1200,     1
*Nset, nset=top_segment__G3
    1,    2,    7,    8,   13,   14
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*Elset, elset=top_segment__G3, generate
 1201,  2150,     1
*Nset, nset=top_segment_shell_top_nodes
   2,   3,   6,   8,   9,  12
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*Nset, nset=top_segment_shell_bot_nodes
   1,   4,   5,   7,  10,  11
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** Section: flange_1pt
*Shell Section, elset=top_segment__PickedSet2, material=umat-flange, controls=EC-1, section integration=GAUSS
28., 2
*Transverse Shear
1.72e+06, 1.72e+06, 0.
** Section: web_1pt
*Shell Section, elset=top_segment__G3, material=umat-web, controls=EC-1, section integration=GAUSS
14.5, 2
*Transverse Shear
890077., 890077., 0.
** ----------------------------------------------------------------
**
** PART INSTANCE: beam_section-1
**
*System
          0.,          0.,        750.,          1.,          0.,        750.
          0., 6.12323399573677e-17,        751.
*Node
   2245,           0.,         500.,           0.
   2246,           0.,        1250.,           0.
   2247,           0.,        2000.,           0.
   2248,           0.,         875.,           0.
   2249,           0.,        1625.,           0.
*Element, type=B31OS
2151, 2245, 2248
2152, 2248, 2246
2153, 2246, 2249
2154, 2249, 2247
*Nset, nset=beam_section-1_Set-1, generate
2245, 2249,  1
*Elset, elset=beam_section-1_Set-1, generate
2151, 2154,  1
*Nset, nset=beam_section-1_Set-2, generate
2245, 2249,  1
*Elset, elset=beam_section-1_Set-2, generate
2151, 2154,  1
** Section: heb500_sec  Profile: heb500
*Beam Section, elset=beam_section-1_Set-1, material=umat-flange, temperature=GRADIENTS, section=I
250., 500., 300., 300., 28., 28., 14.5
1.,0.,0.
*Transverse Shear
7.7e+08, 7.7e+08,
** ----------------------------------------------------------------
**
** PART INSTANCE: shell_segment-1
**
*System
          0.,          0.,       2750.,          1.,          0.,       2750.
*Node
   2250,           0.,        -236.,           0.
   2251,           0.,        -236.,        1250.
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*Element, type=S4R
2155, 2250, 2262, 2632, 2369
2156, 2262, 2263, 2633, 2632
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*Nset, nset=shell_segment-1__PickedSet2
 2250, 2251, 2252, 2253, 2254, 2255
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*Elset, elset=shell_segment-1__PickedSet2, generate
 2155,  3354,     1
*Nset, nset=shell_segment-1__G3
 2250, 2251, 2256, 2257, 2262, 2263
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*Elset, elset=shell_segment-1__G3, generate
 3355,  4304,     1
*Nset, nset=shell_segment-1_shell_top_nodes
2251,2252,2255,2257,2258,2261
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*Nset, nset=shell_segment-1_shell_bot_nodes
2250,2253,2254,2256,2259,2260
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** Section: flange_1pt
*Shell Section, elset=shell_segment-1__PickedSet2, material=umat-flange, controls=EC-1, section integration=GAUSS
28., 2
*Transverse Shear
1.72e+06, 1.72e+06, 0.
** Section: web_1pt
*Shell Section, elset=shell_segment-1__G3, material=umat-web, controls=EC-1, section integration=GAUSS
14.5, 2
*Transverse Shear
890077., 890077., 0.
*System
*Node
   4494,           0.,           0.,        4000.
*Node
   4495,           0.,           0.,           0.
*Nset, nset=Set-10
4494,
*Nset, nset=Set-11
4494,
*Nset, nset=Set-18
4494,
*Nset, nset=Set-19
2246,
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*Nset, nset=_PickedSet7
4494,
*Nset, nset=_PickedSet8
4495,
*Nset, nset=_PickedSet12
4495,
*Nset, nset=_PickedSet13
4494,
*Nset, nset=_PickedSet22
2250,2253,2254,2256,2259,2260
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*Elset, elset=_PickedSet22
 2155, 2205, 2255, 2305, 2355, 2405
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*Nset, nset=_PickedSet23
2247,
*Nset, nset=_PickedSet24
   2,   3,   6,   8,   9,  12
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*Elset, elset=_PickedSet24
   50,  100,  150,  200,  250,  300
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*Nset, nset=_PickedSet25
2245,
*Surface, type=NODE, name=_PickedSet24_CNS_
_PickedSet24, 1.
*Surface, type=NODE, name=_PickedSet22_CNS_
_PickedSet22, 1.
** Constraint: bot_mpc
*MPC, user, mode=node
1280145,2245,  2,   3,   6,   8,   9,  12,  62,  63,  64,  65,  66, 175, 176, 177,
0,      178, 179, 229, 230, 231, 232, 233, 342, 343, 344, 345, 346, 347, 348, 349,
0,      350, 351, 352, 353, 354, 355, 356, 357, 358, 359, 360, 361, 362, 363, 364
** Constraint: rigid_base
*Rigid Body, ref node=_PickedSet8, tie nset=top_segment_shell_bot_nodes
** Constraint: top_mpc
*MPC, user, mode=node
1280145,2247,2250,2253,2254,2256,2259,2260,2365,2366,2367,2368,2369,2370,2371,2372,
0,      2373,2374,2532,2533,2534,2535,2536,2537,2538,2539,2540,2541,2614,2615,2616,
0,      2617,2618,2619,2620,2621,2622,2623,2624,2625,2626,2627,2628,2629,2630,2631
** Constraint: top_plate
*Rigid Body, ref node=_PickedSet7, tie nset=shell_segment-1_shell_top_nodes
**
** ELEMENT CONTROLS
**
*Section Controls, name=EC-1, hourglass=ENHANCED
1., 1., 1.
*Amplitude, name=lateral_pattern
             0.,              0.,              1.,          0.0037,              2.,              0.,              3.,         -0.0037
             4.,              0.,              5.,          0.0037,              6.,              0.,              7.,         -0.0037
             8.,              0.,              9.,           0.005,             10.,              0.,             11.,          -0.005
            12.,              0.,             13.,           0.005,             14.,              0.,             15.,          -0.005
            16.,              0.,             17.,          0.0075,             18.,              0.,             19.,         -0.0075
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           128.,              0.
**
** MATERIALS
**
*Material, name=elastic
*Elastic
191520., 0.3
*Material, name=umat-flange
*Depvar
     10,
*User Material, constants=11
196000.,     0.3,    315.,  138.01,   11.36,   96.16,  223.66, 18587.8
  257.31, 1351.98,    6.52
*Material, name=umat-upd
*Depvar
     10,
*User Material, constants=11
191520.,     0.3,  265.29,  104.44,   11.63,      0.,      1.,  12998.
  99.515, 1560.41,    7.35
*Material, name=umat-upd-2
*Depvar
     10,
*User Material, constants=11
185970.,    0.3, 332.18, 120.48,   8.14,  93.15, 261.75, 21102.
  173.6, 2300.6,  10.42
*Material, name=umat-web
*Depvar
     10,
*User Material, constants=11
196000.,     0.3,    335.,  139.32,   14.07,  120.33,  274.73,  28528.
  315.17, 2569.45,   24.68
**
** BOUNDARY CONDITIONS
**
** Name: bot_fix Type: Displacement/Rotation
*Boundary
_PickedSet12, 1, 1
_PickedSet12, 2, 2
_PickedSet12, 3, 3
_PickedSet12, 4, 4
_PickedSet12, 5, 5
_PickedSet12, 6, 6
** Name: top_fix Type: Displacement/Rotation
*Boundary
Set-10, 1, 1
Set-10, 4, 4
Set-10, 5, 5
Set-10, 6, 6
*IMPERFECTION, input=MPC-4m-Model-2-Imp.txt
** ----------------------------------------------------------------
**
** STEP: gravity_loading
**
*Step, name=gravity_loading, nlgeom=YES, inc=10000
*Static
0.1, 1., 1e-35, 0.1
**
** LOADS
**
** Name: gravity_load   Type: Concentrated force
*Cload
_PickedSet13, 3, -1.6e+06
** Name: twist_imp   Type: Moment
*Cload, follower
Set-19, 6, 2.3e+07
**
** OUTPUT REQUESTS
**
*Restart, write, frequency=0
**
** FIELD OUTPUT: F-Output-1
**
*Output, field, time interval=0.125
*Node Output
CF, RF, U
*Element Output, directions=YES
LE, NFORC, PE, PEEQ, PEMAG, S
*Contact Output
CDISP, CSTRESS
**
** HISTORY OUTPUT: H-Output-1
**
*Output, history, variable=PRESELECT
*End Step
** ----------------------------------------------------------------
**
** STEP: lateral_loading
**
*Step, name=lateral_loading, nlgeom=YES, inc=100000
*Static
0.125, 128., 1e-06, 0.125
**
** BOUNDARY CONDITIONS
**
** Name: disp_control Type: Displacement/Rotation
*Boundary, amplitude=lateral_pattern
Set-11, 2, 2, 4000.
**
** OUTPUT REQUESTS
**
*Restart, write, frequency=0
**
** FIELD OUTPUT: F-Output-1
**
*Output, field, time interval=0.125
*Node Output
CF, RF, U
*Element Output, directions=YES
LE, NFORC, PE, PEEQ, PEMAG, S
*Contact Output
CDISP, CSTRESS
**
** HISTORY OUTPUT: H-Output-1
**
*Output, history, variable=PRESELECT
*End Step
